// SBML level 2 version 4

model m()
  // m

  // Compartments:
  compartment unnamed = 1;

  // Species:
  substanceOnly species X1 in unnamed = 140;  // substance in MWBUILTINUNIT_molecule
  substanceOnly species PO in unnamed = 0;  // substance in MWBUILTINUNIT_molecule
  substanceOnly species H in unnamed = 0;  // substance in MWBUILTINUNIT_molecule
  substanceOnly species M in unnamed = 0;  // substance in MWBUILTINUNIT_molecule
  substanceOnly species PE in unnamed = 0;  // substance in MWBUILTINUNIT_molecule
  substanceOnly species D in unnamed = 0;  // substance in MWBUILTINUNIT_molecule
  substanceOnly species B in unnamed = 0;  // substance in MWBUILTINUNIT_molecule
  substanceOnly species A in unnamed = 0;  // substance in MWBUILTINUNIT_molecule
  substanceOnly species CE in unnamed = 0;  // substance in MWBUILTINUNIT_molecule
  substanceOnly species Y in unnamed = 0;  // substance in MWBUILTINUNIT_molecule
  substanceOnly species CO in unnamed = 0;  // substance in MWBUILTINUNIT_molecule

  // Reactions:
  reaction_13: X1 => PO + H + M; reaction_13_k*X1;
    reaction_13_k = 1;
  reaction_14: PO + PO => PE; reaction_14_k*PO*PO;
    reaction_14_k = 1;
  reaction_15: PO + PE => PO; reaction_15_k*PO*PE;
    reaction_15_k = 1;
  reaction_16: PE + PE => PE; reaction_16_k*PE*PE;
    reaction_16_k = 1;
  reaction_17: H + H => D; reaction_17_k*H*H;
    reaction_17_k = 1;
  reaction_18: M => B + B + B + A + A + A + A + A + A; reaction_18_k*M;
    reaction_18_k = 1;
  reaction_19: B + B + A + A => ; reaction_19_k*B*B*A*A;
    reaction_19_k = 1;
  reaction_20: PE + D => PE + CE + Y; reaction_20_k*PE*D;
    reaction_20_k = 1;
  reaction_21: PO + A => PO + CO + Y; reaction_21_k*PO*A;
    reaction_21_k = 1;
  reaction_22: CE + PO + Y => PO + D; reaction_22_k*CE*PO*Y;
    reaction_22_k = 1;
  reaction_23: CO + PE + Y => PE + A; reaction_23_k*CO*PE*Y;
    reaction_23_k = 1;

  // Unit definitions:
  unit MWBUILTINUNIT_molecule = 1.660539e-24 mole;
end
