// SBML level 2 version 4

model m()
  // m

  // Compartments:
  compartment HailstoneCompartment = 1;

  // Species:
  substanceOnly species X1 in HailstoneCompartment = 140;  // substance in MWBUILTINUNIT_molecule
  substanceOnly species po in HailstoneCompartment = 0;  // substance in MWBUILTINUNIT_molecule
  substanceOnly species h in HailstoneCompartment = 0;  // substance in MWBUILTINUNIT_molecule
  substanceOnly species m in HailstoneCompartment = 0;  // substance in MWBUILTINUNIT_molecule
  substanceOnly species pe in HailstoneCompartment = 0;  // substance in MWBUILTINUNIT_molecule
  substanceOnly species d in HailstoneCompartment = 0;  // substance in MWBUILTINUNIT_molecule
  substanceOnly species b in HailstoneCompartment = 0;  // substance in MWBUILTINUNIT_molecule
  substanceOnly species a in HailstoneCompartment = 0;  // substance in MWBUILTINUNIT_molecule
  substanceOnly species ce in HailstoneCompartment = 0;  // substance in MWBUILTINUNIT_molecule
  substanceOnly species Y in HailstoneCompartment = 0;  // substance in MWBUILTINUNIT_molecule
  substanceOnly species co in HailstoneCompartment = 0;  // substance in MWBUILTINUNIT_molecule

  // Reactions:
  reaction_1: X1 => po + h + m; reaction_1_kf*X1;
    reaction_1_kf = 1;
  reaction_2: po + po => pe; reaction_2_kf*po*po;
    reaction_2_kf = 1;
  reaction_3: pe + po => po; reaction_3_kf*pe*po;
    reaction_3_kf = 1;
  reaction_4: pe + pe => pe; reaction_4_kf*pe*pe;
    reaction_4_kf = 1;
  reaction_5: h + h => d; reaction_5_kf*h*h;
    reaction_5_kf = 1;
  reaction_6: m => b + b + b + a + a + a + a + a + a; reaction_6_kf*m;
    reaction_6_kf = 1;
  reaction_7: b + b + a + a => ; reaction_7_kf*b*b*a*a;
    reaction_7_kf = 1;
  reaction_8: pe + d => pe + ce + Y; reaction_8_kf*pe*d;
    reaction_8_kf = 1;
  reaction_9: po + a => po + co + Y; reaction_9_kf*po*a;
    reaction_9_kf = 1;
  reaction_10: ce + po + Y => po + d; reaction_10_kf*ce*po*Y;
    reaction_10_kf = 1;
  reaction_11: co + pe + Y => pe + a; reaction_11_kf*co*pe*Y;
    reaction_11_kf = 1;
  mutant_new: ce + po + Y => ; mutant_new_kf*ce*po*Y; mutant_new is "mutant-new";
    mutant_new_kf = 1;

  // Unit definitions:
  unit MWBUILTINUNIT_molecule = 1.660539e-24 mole;
end
