// SBML level 2 version 4

model m()
  // m

  // Compartments:
  compartment unnamed = 1;

  // Species:
  substanceOnly species X1 in unnamed = 10000;  // substance in MWBUILTINUNIT_molecule
  substanceOnly species Y in unnamed = 0;  // substance in MWBUILTINUNIT_molecule
  substanceOnly species X2 in unnamed = 10000;  // substance in MWBUILTINUNIT_molecule

  // Reactions:
  reaction_1: X1 => Y; reaction_1_kf*X1;
    reaction_1_kf = 1;
  mutant_changereactant: Y + X1 => ; mutant_changereactant_kf*Y*X1; mutant_changereactant is "mutant-changereactant";
    mutant_changereactant_kf = 1;

  // Unit definitions:
  unit MWBUILTINUNIT_molecule = 1.660539e-24 mole;
end
