// SBML level 2 version 4

model m()
  // m

  // Compartments:
  compartment unnamed = 1;

  // Species:
  substanceOnly species X1 in unnamed = 10000;  // substance in MWBUILTINUNIT_molecule
  substanceOnly species Y in unnamed = 0;  // substance in MWBUILTINUNIT_molecule
  substanceOnly species X2 in unnamed = 10000;  // substance in MWBUILTINUNIT_molecule

  // Reactions:
  reaction_1: X1 => Y; reaction_1_kf*X1;
    reaction_1_kf = 1;
  reaction_2: X2 + Y => ; reaction_2_kf*X2*Y;
    reaction_2_kf = 1;
  mutant_new: X1 + X2 + Y => ; mutant_new_kf*X1*X2*Y; mutant_new is "mutant-new";
    mutant_new_kf = 1;

  // Unit definitions:
  unit MWBUILTINUNIT_molecule = 1.660539e-24 mole;
end
